// SBML level 3 version 1
// SBML generated from Reactome version 96 on 4/10/26, 10:38 AM using JSBML version 1.5.

model pathway_5652084()
  // Fructose metabolism
  // Fructose is found in fruits, is one of the components of the disaccharide sucrose, and is a widely used sweetener in processed foods. Dietary fructose is catabolized in the liver via fructose 1-phosphate to yield dihydroxyacetone phosphate and glyceraldehyde 3-phosphate, which then are converted to pyruvate via steps of canonical glycolysis (Hers and Kusaka 1953; Sillero et al. 1969). Excessive dietary intake of fructose and its metabolism have been associated with major disease risks in humans, although this issue remains controversial (Kolderup and Svihus 2015; DiNicolantonio et al. 2015; Bray 2013; Mayes 1993; Rippe and Angelopoulos 2013; van Buul et al. 2013). Fructose can also be synthesized from glucose via the polyol pathway (Hers 1960; Oates 2008). This synthetic process provides the fructose found in seminal fluid and, in other tissues, can contribute to pathologies of diabetes.

  // Compartments:
  compartment cytosol;

  // Species:
  // Derived from a Reactome SimpleEntity. This is a small compound
  species beta_D_Fru_1_P_cytosol in cytosol; beta_D_Fru_1_P_cytosol is "beta-D-Fru 1-P [cytosol]";
  // Derived from a Reactome SimpleEntity. This is a small compound
  species keto_D_Fru_cytosol in cytosol; keto_D_Fru_cytosol is "keto-D-Fru [cytosol]";
  // Derived from a Reactome SimpleEntity. This is a small compound
  species NAD_cytosol in cytosol; NAD_cytosol is "NAD+ [cytosol]";
  // Derived from a Reactome SimpleEntity. This is a small compound
  species _3PDGA_cytosol in cytosol; _3PDGA_cytosol is "3PDGA [cytosol]";
  // Derived from a Reactome SimpleEntity. This is a small compound
  species DGA_cytosol in cytosol; DGA_cytosol is "DGA [cytosol]";
  // Derived from a Reactome SimpleEntity. This is a small compound
  species Glc_cytosol in cytosol; Glc_cytosol is "Glc [cytosol]";
  // Derived from a Reactome SimpleEntity. This is a small compound
  species beta_D_Fru_cytosol in cytosol; beta_D_Fru_cytosol is "beta-D-Fru [cytosol]";
  // Derived from a Reactome SimpleEntity. This is a small compound
  species ATP_cytosol in cytosol; ATP_cytosol is "ATP [cytosol]";
  // Derived from a Reactome Complex. Here is Reactomes nested structure for this complex: (4xP05062). Reactome uses a nested structure for complexes, which cannot be fully represented in SBML Level 3 Version 1 core
  species ALDOB_tetramer_cytosol in cytosol; ALDOB_tetramer_cytosol is "ALDOB tetramer [cytosol]";
  // Derived from a Reactome Complex. Here is Reactomes nested structure for this complex: (4x18420, 2xQ3LXA3). Reactome uses a nested structure for complexes, which cannot be fully represented in SBML Level 3 Version 1 core
  species TKFC_2Mg2_dimer_cytosol in cytosol; TKFC_2Mg2_dimer_cytosol is "TKFC:2Mg2+ dimer [cytosol]";
  // Derived from a Reactome SimpleEntity. This is a small compound
  species H2O_cytosol in cytosol; H2O_cytosol is "H2O [cytosol]";
  // Derived from a Reactome SimpleEntity. This is a small compound
  species NADH_cytosol in cytosol; NADH_cytosol is "NADH [cytosol]";
  // Derived from a Reactome SimpleEntity. This is a small compound
  species K_cytosol in cytosol; K_cytosol is "K+ [cytosol]";
  // Derived from a Reactome SimpleEntity. This is a small compound
  species H_cytosol in cytosol; H_cytosol is "H+ [cytosol]";
  // Derived from a Reactome Complex. Here is Reactomes nested structure for this complex: (4xP00352). Reactome uses a nested structure for complexes, which cannot be fully represented in SBML Level 3 Version 1 core
  species ALDH1A1_tetramer_cytosol in cytosol; ALDH1A1_tetramer_cytosol is "ALDH1A1 tetramer [cytosol]";
  // Derived from a Reactome SimpleEntity. This is a small compound
  species GA3P_cytosol in cytosol; GA3P_cytosol is "GA3P [cytosol]";
  // Derived from a Reactome EntityWithAccessionedSequence. This is a protein
  species AKR1B1_cytosol in cytosol; AKR1B1_cytosol is "AKR1B1 [cytosol]";
  // Derived from a Reactome Complex. Here is Reactomes nested structure for this complex: (4x29105, 4xQ00796). Reactome uses a nested structure for complexes, which cannot be fully represented in SBML Level 3 Version 1 core
  species SORD_tetramer_cytosol in cytosol; SORD_tetramer_cytosol is "SORD tetramer [cytosol]";
  // Derived from a Reactome SimpleEntity. This is a small compound
  species ADP_cytosol in cytosol; ADP_cytosol is "ADP [cytosol]";
  // Derived from a Reactome SimpleEntity. This is a small compound
  species GA_cytosol in cytosol; GA_cytosol is "GA [cytosol]";
  // Derived from a Reactome SimpleEntity. This is a small compound
  species NADP_cytosol in cytosol; NADP_cytosol is "NADP+ [cytosol]";
  // Derived from a Reactome Complex. Here is Reactomes nested structure for this complex: (2xP50053). Reactome uses a nested structure for complexes, which cannot be fully represented in SBML Level 3 Version 1 core
  species KHK_dimer_cytosol in cytosol; KHK_dimer_cytosol is "KHK dimer [cytosol]";
  // Derived from a Reactome SimpleEntity. This is a small compound
  species DHAP_cytosol in cytosol; DHAP_cytosol is "DHAP [cytosol]";
  // Derived from a Reactome SimpleEntity. This is a small compound
  species NADPH_cytosol in cytosol; NADPH_cytosol is "NADPH [cytosol]";
  // Derived from a Reactome EntityWithAccessionedSequence. This is a protein
  species GLYCTK_cytosol in cytosol; GLYCTK_cytosol is "GLYCTK [cytosol]";
  // Derived from a Reactome SimpleEntity. This is a small compound
  species D_sorbitol_cytosol in cytosol; D_sorbitol_cytosol is "D-sorbitol [cytosol]";

  // Parameters:
  lambda_reaction_5652172 = 10;
  lambda_reaction_5652195 = 10;
  lambda_reaction_70333 = 10;
  lambda_reaction_6813749 = 10;
  lambda_reaction_70342 = 10;
  lambda_reaction_6799495 = 10;
  lambda_reaction_70349 = 10;
  K_in_29360 = 10;
  K_in_70113 = 10;
  K_in_9832977 = 10;
  K_in_113592 = 10;
  K_in_70340 = 10;
  K_in_5652070 = 10;
  K_in_29356 = 10;
  K_in_29804 = 10;
  K_in_71689 = 10;
  K_in_196063 = 10;
  K_in_5652211 = 10;
  K_in_3006523 = 10;
  K_in_29364 = 10;
  K_in_6799244 = 10;
  K_out_9832975 = 1;
  K_out_6799493 = 1;
  K_out_73473 = 1;
  K_out_29578 = 1;
  K_out_29366 = 1;
  K_out_75970 = 1;
  y_9832976 = 0;
  y2_9832976 = 0;
  y_9832975 = 0;
  y2_9832975 = 0;
  y_29360 = 0;
  y2_29360 = 0;
  y_6799493 = 0;
  y2_6799493 = 0;
  y_6799497 = 0;
  y2_6799497 = 0;
  y_70113 = 0;
  y2_70113 = 0;
  y_9832977 = 0;
  y2_9832977 = 0;
  y_113592 = 0;
  y2_113592 = 0;
  y_70340 = 0;
  y2_70340 = 0;
  y_5652070 = 0;
  y2_5652070 = 0;
  y_29356 = 0;
  y2_29356 = 0;
  y_73473 = 0;
  y2_73473 = 0;
  y_29804 = 0;
  y2_29804 = 0;
  y_70106 = 0;
  y2_70106 = 0;
  y_71689 = 0;
  y2_71689 = 0;
  y_29578 = 0;
  y2_29578 = 0;
  y_196063 = 0;
  y2_196063 = 0;
  y_5652211 = 0;
  y2_5652211 = 0;
  y_29370 = 0;
  y2_29370 = 0;
  y_30393 = 0;
  y2_30393 = 0;
  y_29366 = 0;
  y2_29366 = 0;
  y_3006523 = 0;
  y2_3006523 = 0;
  y_75970 = 0;
  y2_75970 = 0;
  y_29364 = 0;
  y2_29364 = 0;
  y_6799244 = 0;
  y2_6799244 = 0;
  y_5652213 = 0;
  y2_5652213 = 0;

  // Rate rules:
  y_9832976' = (beta_D_Fru_1_P_cytosol - y_9832976)/(time + 1e-6);
  y2_9832976' = (beta_D_Fru_1_P_cytosol^2 - y2_9832976)/(time + 1e-6);
  y_9832975' = (keto_D_Fru_cytosol - y_9832975)/(time + 1e-6);
  y2_9832975' = (keto_D_Fru_cytosol^2 - y2_9832975)/(time + 1e-6);
  y_29360' = (NAD_cytosol - y_29360)/(time + 1e-6);
  y2_29360' = (NAD_cytosol^2 - y2_29360)/(time + 1e-6);
  y_6799493' = (_3PDGA_cytosol - y_6799493)/(time + 1e-6);
  y2_6799493' = (_3PDGA_cytosol^2 - y2_6799493)/(time + 1e-6);
  y_6799497' = (DGA_cytosol - y_6799497)/(time + 1e-6);
  y2_6799497' = (DGA_cytosol^2 - y2_6799497)/(time + 1e-6);
  y_70113' = (Glc_cytosol - y_70113)/(time + 1e-6);
  y2_70113' = (Glc_cytosol^2 - y2_70113)/(time + 1e-6);
  y_9832977' = (beta_D_Fru_cytosol - y_9832977)/(time + 1e-6);
  y2_9832977' = (beta_D_Fru_cytosol^2 - y2_9832977)/(time + 1e-6);
  y_113592' = (ATP_cytosol - y_113592)/(time + 1e-6);
  y2_113592' = (ATP_cytosol^2 - y2_113592)/(time + 1e-6);
  y_70340' = (ALDOB_tetramer_cytosol - y_70340)/(time + 1e-6);
  y2_70340' = (ALDOB_tetramer_cytosol^2 - y2_70340)/(time + 1e-6);
  y_5652070' = (TKFC_2Mg2_dimer_cytosol - y_5652070)/(time + 1e-6);
  y2_5652070' = (TKFC_2Mg2_dimer_cytosol^2 - y2_5652070)/(time + 1e-6);
  y_29356' = (H2O_cytosol - y_29356)/(time + 1e-6);
  y2_29356' = (H2O_cytosol^2 - y2_29356)/(time + 1e-6);
  y_73473' = (NADH_cytosol - y_73473)/(time + 1e-6);
  y2_73473' = (NADH_cytosol^2 - y2_73473)/(time + 1e-6);
  y_29804' = (K_cytosol - y_29804)/(time + 1e-6);
  y2_29804' = (K_cytosol^2 - y2_29804)/(time + 1e-6);
  y_70106' = (H_cytosol - y_70106)/(time + 1e-6);
  y2_70106' = (H_cytosol^2 - y2_70106)/(time + 1e-6);
  y_71689' = (ALDH1A1_tetramer_cytosol - y_71689)/(time + 1e-6);
  y2_71689' = (ALDH1A1_tetramer_cytosol^2 - y2_71689)/(time + 1e-6);
  y_29578' = (GA3P_cytosol - y_29578)/(time + 1e-6);
  y2_29578' = (GA3P_cytosol^2 - y2_29578)/(time + 1e-6);
  y_196063' = (AKR1B1_cytosol - y_196063)/(time + 1e-6);
  y2_196063' = (AKR1B1_cytosol^2 - y2_196063)/(time + 1e-6);
  y_5652211' = (SORD_tetramer_cytosol - y_5652211)/(time + 1e-6);
  y2_5652211' = (SORD_tetramer_cytosol^2 - y2_5652211)/(time + 1e-6);
  y_29370' = (ADP_cytosol - y_29370)/(time + 1e-6);
  y2_29370' = (ADP_cytosol^2 - y2_29370)/(time + 1e-6);
  y_30393' = (GA_cytosol - y_30393)/(time + 1e-6);
  y2_30393' = (GA_cytosol^2 - y2_30393)/(time + 1e-6);
  y_29366' = (NADP_cytosol - y_29366)/(time + 1e-6);
  y2_29366' = (NADP_cytosol^2 - y2_29366)/(time + 1e-6);
  y_3006523' = (KHK_dimer_cytosol - y_3006523)/(time + 1e-6);
  y2_3006523' = (KHK_dimer_cytosol^2 - y2_3006523)/(time + 1e-6);
  y_75970' = (DHAP_cytosol - y_75970)/(time + 1e-6);
  y2_75970' = (DHAP_cytosol^2 - y2_75970)/(time + 1e-6);
  y_29364' = (NADPH_cytosol - y_29364)/(time + 1e-6);
  y2_29364' = (NADPH_cytosol^2 - y2_29364)/(time + 1e-6);
  y_6799244' = (GLYCTK_cytosol - y_6799244)/(time + 1e-6);
  y2_6799244' = (GLYCTK_cytosol^2 - y2_6799244)/(time + 1e-6);
  y_5652213' = (D_sorbitol_cytosol - y_5652213)/(time + 1e-6);
  y2_5652213' = (D_sorbitol_cytosol^2 - y2_5652213)/(time + 1e-6);

  // Reactions:
  // Cytosolic AKR1B1 (aldose reductase) catalyzes the reaction of glucose (Glc) and NADPH + H+ to form D-sorbitol and NADP+. This reaction was first described by Hers (1960) in sheep seminal vesicles; the human enzyme was identified by Nishimura et al. (1990) and is a potential target for treatment of diabetic neuropathy (Oates, 2008). The active enzyme is a monomer (Ruiz et al. 2004) whose amino-terminal methionine residue has been removed (Jacquinod et al. 1993). Under physiological conditions, formation of D-sorbitol is strongly favored (Grimshaw 1992).
  AKR1B1_reduces_Glc_to_D_sorbitol: Glc_cytosol + NADPH_cytosol + H_cytosol => D_sorbitol_cytosol + NADP_cytosol; lambda_reaction_5652172*(AKR1B1_cytosol^10/(0.5^10 + AKR1B1_cytosol^10))*Glc_cytosol*NADPH_cytosol*H_cytosol; AKR1B1_reduces_Glc_to_D_sorbitol is "AKR1B1 reduces Glc to D-sorbitol";  // modifiers: AKR1B1_cytosol
  // Cytosolic SORD (sorbitol dehydrogenase) catalyzes the reaction of D-sorbitol and NAD+ to form fructose (Fru) and NADH + H+. This reaction was first described by Hers (1960) in sheep seminal vesicles; the human enzyme was identified by O'Brien et al. (1983). The active enzyme is a tetramer with four associated Zn2+ ions (Pauly et al. 2003) whose amino-terminal methionine residue has been removed (Karlsson et al. 1989).
  SORD_oxidizes_D_sorbitol_to_Fru: NAD_cytosol + D_sorbitol_cytosol => NADH_cytosol + keto_D_Fru_cytosol + H_cytosol; lambda_reaction_5652195*(SORD_tetramer_cytosol^10/(0.5^10 + SORD_tetramer_cytosol^10))*NAD_cytosol*D_sorbitol_cytosol; SORD_oxidizes_D_sorbitol_to_Fru is "SORD oxidizes D-sorbitol to Fru";  // modifiers: SORD_tetramer_cytosol
  // Cytosolic ketohexokinase (KHK, also known as fructokinase) catalyzes the reaction of D-fructose (Fru) and ATP to form D-fructose 1-phosphate (Fru 1-P) and ADP. Two isoforms of the enzyme, A and C, are encoded by alternatively spliced forms of the gene; both form catalytically active dimers. The C isoform is predominant in liver and kidney tissues, has high affinity for fructose, and is probably responsible for the bulk of fructose phosphorylation in vivo (Asipu et al. 2003; Trinh et al. 2009). The A isoform is found in lower levels in many other tissues and may serve a role in fructose metabolism outside of liver and kidney (Funari et al. 2005). The physiological role of KHK has been established from metabolic and DNA sequencing studies of patients with essential fructosuria (Bonthron et al. 1994) and in mouse models for this disease (Diggle et al. 2010; Ishimoto et al. 2012).
  reaction_70333: beta_D_Fru_cytosol + ATP_cytosol => beta_D_Fru_1_P_cytosol + H_cytosol + ADP_cytosol; lambda_reaction_70333*(KHK_dimer_cytosol^10/(0.5^10 + KHK_dimer_cytosol^10))*(K_cytosol^10/(0.5^10 + K_cytosol^10))*(0.5^10/(0.5^10 + ADP_cytosol^10))*beta_D_Fru_cytosol*ATP_cytosol; reaction_70333 is "KHK dimer phosphorylates Fru to Fru 1-P";  // modifiers: KHK_dimer_cytosol, K_cytosol
  // Retinal dehydrogenase 1 (ALDH1A1 tetramer) is a cytosolic aldehyde dehydrogenase that can oxidise glyceraldehyde (GA) to D-glycerate (DGA) (Yoval-Sanchez et al. 2013). DGA is a metabolite in a minor pathway of fructose catabolism and serine catabolism.
  ALDH1A1_oxidises_GA_to_DGA: H2O_cytosol + NAD_cytosol + GA_cytosol => NADH_cytosol + 2 H_cytosol + DGA_cytosol; lambda_reaction_6813749*(ALDH1A1_tetramer_cytosol^10/(0.5^10 + ALDH1A1_tetramer_cytosol^10))*H2O_cytosol*NAD_cytosol*GA_cytosol;  // modifiers: ALDH1A1_tetramer_cytosol
  // Cytosolic aldolase B (ALDOB) catalyzes the reaction of D-fructose 1-phosphate (Fru 1-P) to form dihydroxyacetone phosphate (DHAP) and D-glyceraldehyde (GA) (Hers and Kusaka 1953; Schapira 1975). The active form of the enzyme is a tetramer (Dalby et al. 2001). Deficiencies in the enzyme are associated with hereditary fructose intolerance in vivo (e.g., Tolan 1995; Ali et al. 1998).ALDOB is the same aldolase isoform that catalyzes the reversible cleavage of fructose-1,6-bisphosphate in glycolysis. This isoform, found in liver, kidney, and intestine, is approximately equally active with fructose 1 phosphate and fructose 1,6 bisphosphate as substrates at saturating concentrations, while the muscle and brain isoforms (ALDOA and ALDOC, respectively), have little activity with fructose-1-phosphate (Lebherz and Rutter 1969; Penhoet et el. 1969).
  reaction_70342: beta_D_Fru_1_P_cytosol => DHAP_cytosol + GA_cytosol; lambda_reaction_70342*(ALDOB_tetramer_cytosol^10/(0.5^10 + ALDOB_tetramer_cytosol^10))*beta_D_Fru_1_P_cytosol; reaction_70342 is "ALDOB tetramer cleaves Fru-1-P to GA and DHAP";  // modifiers: ALDOB_tetramer_cytosol
  // D-glyceric acid (DGA) is an intermediate of serine catabolism and of a minor pathway of fructose metabolism. The only known fate of DGA is phosphorylation to 3-phospho-D-glyceric acid (3PDGA) by cytosolic glycerate kinase (GLYCTK) (Yu et al. 2006). Defects in GLYCTK can cause D-glyceric aciduria (D-GA; MIM:220120), a rare inborn error of serine and fructose metabolism where DGA is excreted in large amounts in the urine. A variable phenotype is observed, ranging from severe mental retardation and death to milder speech delays and normal development (Van Schaftingen 1989, Sass et al. 2010).
  reaction_6799495: ATP_cytosol + DGA_cytosol => H_cytosol + _3PDGA_cytosol + ADP_cytosol; lambda_reaction_6799495*(GLYCTK_cytosol^10/(0.5^10 + GLYCTK_cytosol^10))*ATP_cytosol*DGA_cytosol; reaction_6799495 is "GLYCTK phosphorylates DGA to 3PDGA";  // modifiers: GLYCTK_cytosol
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  reaction_70349: ATP_cytosol + GA_cytosol => GA3P_cytosol + ADP_cytosol; lambda_reaction_70349*(TKFC_2Mg2_dimer_cytosol^10/(0.5^10 + TKFC_2Mg2_dimer_cytosol^10))*ATP_cytosol*GA_cytosol; reaction_70349 is "DAK dimer phosphorylates D-glyceraldehyde to form D-glyceraldehyde 3-phosphate";  // modifiers: TKFC_2Mg2_dimer_cytosol
  source_29360: => NAD_cytosol; K_in_29360;
  source_70113: => Glc_cytosol; K_in_70113;
  source_9832977: => beta_D_Fru_cytosol; K_in_9832977;
  source_113592: => ATP_cytosol; K_in_113592;
  source_70340: => ALDOB_tetramer_cytosol; K_in_70340;
  source_5652070: => TKFC_2Mg2_dimer_cytosol; K_in_5652070;
  source_29356: => H2O_cytosol; K_in_29356;
  source_29804: => K_cytosol; K_in_29804;
  source_71689: => ALDH1A1_tetramer_cytosol; K_in_71689;
  source_196063: => AKR1B1_cytosol; K_in_196063;
  source_5652211: => SORD_tetramer_cytosol; K_in_5652211;
  source_3006523: => KHK_dimer_cytosol; K_in_3006523;
  source_29364: => NADPH_cytosol; K_in_29364;
  source_6799244: => GLYCTK_cytosol; K_in_6799244;
  sink_9832975: keto_D_Fru_cytosol => ; K_out_9832975*keto_D_Fru_cytosol;
  sink_6799493: _3PDGA_cytosol => ; K_out_6799493*_3PDGA_cytosol;
  sink_73473: NADH_cytosol => ; K_out_73473*NADH_cytosol;
  sink_29578: GA3P_cytosol => ; K_out_29578*GA3P_cytosol;
  sink_29366: NADP_cytosol => ; K_out_29366*NADP_cytosol;
  sink_75970: DHAP_cytosol => ; K_out_75970*DHAP_cytosol;
end
