// SBML level 3 version 1
// SBML generated from Reactome version 96 on 4/6/26, 7:41 PM using JSBML version 1.5.

model pathway_5653890()
  // Lactose synthesis
  // Synthesis of the disaccharide lactose takes place within the Golgi apparatus of epithelial cells of the lactating mammary gland. The synthesis itself is a single chemical reaction of free glucose and UDP-galactose to form lactose and UDP. For this reaction to occur, glucose is transported from the cytosol into the Golgi lumen, and B4GALT1 interacts with LALBA (alpha-lactalbumin) to modulate its substrate specificity (Brew and Hill 1975).

  // Compartments:
  compartment cytosol;
  compartment Golgi_lumen;
  compartment Golgi_membrane;

  // Species:
  // Derived from a Reactome SimpleEntity. This is a small compound
  species Glc_cytosol in cytosol; Glc_cytosol is "Glc [cytosol]";
  // Derived from a Reactome SimpleEntity. This is a small compound
  species Lac_Golgi_lumen in Golgi_lumen; Lac_Golgi_lumen is "Lac [Golgi lumen]";
  // Derived from a Reactome SimpleEntity. This is a small compound
  species UDP_Gal_Golgi_lumen in Golgi_lumen; UDP_Gal_Golgi_lumen is "UDP-Gal [Golgi lumen]";
  // Derived from a Reactome SimpleEntity. This is a small compound
  species Glc_Golgi_lumen in Golgi_lumen; Glc_Golgi_lumen is "Glc [Golgi lumen]";
  // Derived from a Reactome SimpleEntity. This is a small compound
  species H_Golgi_lumen in Golgi_lumen; H_Golgi_lumen is "H+ [Golgi lumen]";
  // Derived from a Reactome Complex. Here is Reactomes nested structure for this complex: (4xP11166). Reactome uses a nested structure for complexes, which cannot be fully represented in SBML Level 3 Version 1 core
  species SLC2A1_tetramer_Golgi_membrane in Golgi_membrane; SLC2A1_tetramer_Golgi_membrane is "SLC2A1 tetramer [Golgi membrane]";
  // Derived from a Reactome SimpleEntity. This is a small compound
  species Mn2_Golgi_lumen in Golgi_lumen; Mn2_Golgi_lumen is "Mn2+ [Golgi lumen]";
  // Derived from a Reactome SimpleEntity. This is a small compound
  species UDP_Golgi_lumen in Golgi_lumen; UDP_Golgi_lumen is "UDP [Golgi lumen]";
  // Derived from a Reactome EntityWithAccessionedSequence. This is a protein
  species B4GALT1_Golgi_membrane in Golgi_membrane; B4GALT1_Golgi_membrane is "B4GALT1 [Golgi membrane]";
  // Derived from a Reactome Complex. Here is Reactomes nested structure for this complex: (P15291, P00709). Reactome uses a nested structure for complexes, which cannot be fully represented in SBML Level 3 Version 1 core
  species B4GALT1_LALBA_Golgi_membrane in Golgi_membrane; B4GALT1_LALBA_Golgi_membrane is "B4GALT1:LALBA [Golgi membrane]";
  // Derived from a Reactome EntityWithAccessionedSequence. This is a protein
  species LALBA_Golgi_lumen in Golgi_lumen; LALBA_Golgi_lumen is "LALBA [Golgi lumen]";

  // Parameters:
  lambda_reaction_5653886 = 10;
  lambda_reaction_5653878 = 10;
  lambda_reaction_5653873 = 10;
  K_in_70113 = 10;
  K_in_735682 = 10;
  K_in_5653881 = 10;
  K_in_5653875 = 10;
  K_in_528072 = 10;
  K_in_5653896 = 10;
  K_out_5653871 = 1;
  K_out_425969 = 1;
  K_out_205687 = 1;
  y_70113 = 0;
  y2_70113 = 0;
  y_5653871 = 0;
  y2_5653871 = 0;
  y_735682 = 0;
  y2_735682 = 0;
  y_964746 = 0;
  y2_964746 = 0;
  y_425969 = 0;
  y2_425969 = 0;
  y_5653881 = 0;
  y2_5653881 = 0;
  y_5653875 = 0;
  y2_5653875 = 0;
  y_205687 = 0;
  y2_205687 = 0;
  y_528072 = 0;
  y2_528072 = 0;
  y_5653885 = 0;
  y2_5653885 = 0;
  y_5653896 = 0;
  y2_5653896 = 0;

  // Rate rules:
  y_70113' = (Glc_cytosol - y_70113)/(time + 1e-6);
  y2_70113' = (Glc_cytosol^2 - y2_70113)/(time + 1e-6);
  y_5653871' = (Lac_Golgi_lumen - y_5653871)/(time + 1e-6);
  y2_5653871' = (Lac_Golgi_lumen^2 - y2_5653871)/(time + 1e-6);
  y_735682' = (UDP_Gal_Golgi_lumen - y_735682)/(time + 1e-6);
  y2_735682' = (UDP_Gal_Golgi_lumen^2 - y2_735682)/(time + 1e-6);
  y_964746' = (Glc_Golgi_lumen - y_964746)/(time + 1e-6);
  y2_964746' = (Glc_Golgi_lumen^2 - y2_964746)/(time + 1e-6);
  y_425969' = (H_Golgi_lumen - y_425969)/(time + 1e-6);
  y2_425969' = (H_Golgi_lumen^2 - y2_425969)/(time + 1e-6);
  y_5653881' = (SLC2A1_tetramer_Golgi_membrane - y_5653881)/(time + 1e-6);
  y2_5653881' = (SLC2A1_tetramer_Golgi_membrane^2 - y2_5653881)/(time + 1e-6);
  y_5653875' = (Mn2_Golgi_lumen - y_5653875)/(time + 1e-6);
  y2_5653875' = (Mn2_Golgi_lumen^2 - y2_5653875)/(time + 1e-6);
  y_205687' = (UDP_Golgi_lumen - y_205687)/(time + 1e-6);
  y2_205687' = (UDP_Golgi_lumen^2 - y2_205687)/(time + 1e-6);
  y_528072' = (B4GALT1_Golgi_membrane - y_528072)/(time + 1e-6);
  y2_528072' = (B4GALT1_Golgi_membrane^2 - y2_528072)/(time + 1e-6);
  y_5653885' = (B4GALT1_LALBA_Golgi_membrane - y_5653885)/(time + 1e-6);
  y2_5653885' = (B4GALT1_LALBA_Golgi_membrane^2 - y2_5653885)/(time + 1e-6);
  y_5653896' = (LALBA_Golgi_lumen - y_5653896)/(time + 1e-6);
  y2_5653896' = (LALBA_Golgi_lumen^2 - y2_5653896)/(time + 1e-6);

  // Reactions:
  // B4GALT1 (beta-1,4-galactosyltransferase 1) in the Golgi membrane associates with LALBA (alpha-lactalbumin) to form a heterodimer. This binding reaction is positively regulated by Mn2+ ions and UDP-galactose. This heterodimer has been observed both in solution in vitro and in crystalline form (Andrews 1970; Ramakrishnan and Qasba 2001). The galactosyltransferase enzyme is found in the Golgi membrane of many cell types. LALBA is expressed specifically in the lactating mammary gland. Binding LALBA modulates the specificity of the galactosyltransferase enzyme. Alone, B4GALT1 transfers galactose moieties to glycolipids and N-linked oligosaccharides of glycoproteins. Complexed with LALBA, it transfers galactose to free glucose to form lactose (Brew and Hill 1975).
  B4GALT1_binds_LALBA: B4GALT1_Golgi_membrane + LALBA_Golgi_lumen => B4GALT1_LALBA_Golgi_membrane; lambda_reaction_5653886*(LALBA_Golgi_lumen^10/(0.5^10 + LALBA_Golgi_lumen^10))*(UDP_Gal_Golgi_lumen^10/(0.5^10 + UDP_Gal_Golgi_lumen^10))*(Mn2_Golgi_lumen^10/(0.5^10 + Mn2_Golgi_lumen^10))*B4GALT1_Golgi_membrane*LALBA_Golgi_lumen;  // modifiers: UDP_Gal_Golgi_lumen, Mn2_Golgi_lumen
  // In the Golgi membrane, the B4GALT1 subunit of the B4GALT1:LALBA (beta-1,4-galactosyltransferase 1 : alpha-lactalbumin) complex catalyzes the transfer of galactose from UDP-galactose to free glucose to form galactose and UDP (Andrews 1970; Ramakrishnan and Qasba 2001). The representation here of a stable protein complex catalyzing the transformation of small molecule substrates provides a simplified view of the true reaction mechanism (Brew and Hill 1975), but is sufficient to identify the key participating molecules and their roles.
  reaction_5653878: UDP_Gal_Golgi_lumen + Glc_Golgi_lumen => Lac_Golgi_lumen + H_Golgi_lumen + UDP_Golgi_lumen; lambda_reaction_5653878*(B4GALT1_LALBA_Golgi_membrane^10/(0.5^10 + B4GALT1_LALBA_Golgi_membrane^10))*UDP_Gal_Golgi_lumen*Glc_Golgi_lumen; reaction_5653878 is "B4GALT1:LALBA transfers Gal from UDP-Gal to Glc to form Lac";  // modifiers: B4GALT1_LALBA_Golgi_membrane
  // SLC2A1 (aka GLUT1) tetramer in the Golgi membrane mediates the facilitated diffusion of glucose from the cytosol into the Golgi lumen. SLC2A1, normally confined to the plasma membrane, is also abundant in the Golgi membranes of epithelial cells of the lactating mammary gland, as demonstrated experimentally in mice (Nemeth et al. 2000). It is not known how this physiological state-specific relocalization is regulated.
  reaction_5653873: Glc_cytosol => Glc_Golgi_lumen; lambda_reaction_5653873*(SLC2A1_tetramer_Golgi_membrane^10/(0.5^10 + SLC2A1_tetramer_Golgi_membrane^10))*Glc_cytosol; reaction_5653873 is "SLC2A1 tetramer transports Glc from cytosol to Golgi lumen";  // modifiers: SLC2A1_tetramer_Golgi_membrane
  source_70113: => Glc_cytosol; K_in_70113;
  source_735682: => UDP_Gal_Golgi_lumen; K_in_735682;
  source_5653881: => SLC2A1_tetramer_Golgi_membrane; K_in_5653881;
  source_5653875: => Mn2_Golgi_lumen; K_in_5653875;
  source_528072: => B4GALT1_Golgi_membrane; K_in_528072;
  source_5653896: => LALBA_Golgi_lumen; K_in_5653896;
  sink_5653871: Lac_Golgi_lumen => ; K_out_5653871*Lac_Golgi_lumen;
  sink_425969: H_Golgi_lumen => ; K_out_425969*H_Golgi_lumen;
  sink_205687: UDP_Golgi_lumen => ; K_out_205687*UDP_Golgi_lumen;
end
