// SBML level 3 version 1
// SBML generated from Reactome version 96 on 4/7/26, 7:44 PM using JSBML version 1.5.

model pathway_8853383()
  // Lysosomal oligosaccharide catabolism
  // N-Glycosylation is one of the most common co- and posttranslational modifications of eukaryotic proteins occurring in the ER lumen. N-glycosylation plays pivotal roles in protein folding and intra- or inter-cellular trafficking of N-glycosylated proteins. Quality control mechanisms in the ER sift out incorrectly-folded proteins from correctly-folded proteins, the former then destined for degradation. Incorrectly-folded N-glycans are exported to the cytosol where the process of degradation begins. Once the unfolded protein is cleaved from the oligosaccharide (forming free oligosaccharides, fOS), step-wise degradation of mannose moieties, both in the cytosol (Suzuki and Harada 2014) and then in the lysosome (Aronson and Kuranda 1989, Winchester 2005), results in complete degradation. Breakdown must be complete to avoid lysosomal storage diseases that occur when fragments as small as dimers are left undigested.

  // Compartments:
  compartment cytosol;
  compartment lysosomal_lumen;

  // Species:
  // Derived from a Reactome SimpleEntity. This is a small compound
  species H2O_cytosol in cytosol; H2O_cytosol is "H2O [cytosol]";
  // Derived from a Reactome Complex. Here is Reactomes nested structure for this complex: (29105, Q9Y2E5). Reactome uses a nested structure for complexes, which cannot be fully represented in SBML Level 3 Version 1 core
  species MAN2B2_Zn2_lysosomal_lumen in lysosomal_lumen; MAN2B2_Zn2_lysosomal_lumen is "MAN2B2:Zn2+ [lysosomal lumen]";
  // Derived from a Reactome SimpleEntity. This is a small compound
  species species_8853396 in lysosomal_lumen; species_8853396 is "alpha-D-Man-(1->3)-[alpha-D-Man-(1->3)-[alpha-D-Man-(1->6)]-alpha-D-Man-(1->6)]-beta-D-Man-(1->4)-beta-D-GlcNAc [lysosomal lumen]";
  // Derived from a Reactome SimpleEntity. This is a small compound
  species Man_lysosomal_lumen in lysosomal_lumen; Man_lysosomal_lumen is "Man [lysosomal lumen]";
  // Derived from a Reactome SimpleEntity. This is a small compound
  species GlcNAc_lysosomal_lumen in lysosomal_lumen; GlcNAc_lysosomal_lumen is "GlcNAc [lysosomal lumen]";
  // Derived from a Reactome SimpleEntity. This is a small compound
  species Man_cytosol in cytosol; Man_cytosol is "Man [cytosol]";
  // Derived from a Reactome SimpleEntity. This is a small compound
  species species_6799540 in cytosol; species_6799540 is "alpha-D-Man-(1->2)-alpha-D-Man-(1->2)-alpha-D-Man-(1->3)-[alpha-D-Man-(1->2)-alpha-D-Man-(1->3)-[alpha-D-Man-(1->2)-alpha-D-Man-(1->6)]-alpha-D-Man-(1->6)]-beta-D-Man-(1->4)-beta-D-GlcNAc [cytosol]";
  // Derived from a Reactome Complex. Here is Reactomes nested structure for this complex: (29105, O00754). Reactome uses a nested structure for complexes, which cannot be fully represented in SBML Level 3 Version 1 core
  species MAN2B1_Zn2_lysosomal_lumen in lysosomal_lumen; MAN2B1_Zn2_lysosomal_lumen is "MAN2B1:Zn2+ [lysosomal lumen]";
  // Derived from a Reactome SimpleEntity. This is a small compound
  species species_6799577 in lysosomal_lumen; species_6799577 is "alpha-D-Man-(1->3)-[alpha-D-Man-(1->6)]-beta-D-Man-(1->4)-beta-D-GlcNAc [lysosomal lumen]";
  // Derived from a Reactome Complex. Here is Reactomes nested structure for this complex: (Q9NTJ4, 29105). Reactome uses a nested structure for complexes, which cannot be fully represented in SBML Level 3 Version 1 core
  species MAN2C1_Zn2_cytosol in cytosol; MAN2C1_Zn2_cytosol is "MAN2C1:Zn2+ [cytosol]";
  // Derived from a Reactome SimpleEntity. This is a small compound
  species GlcNAc_Man_lysosomal_lumen in lysosomal_lumen; GlcNAc_Man_lysosomal_lumen is "GlcNAc:Man [lysosomal lumen]";
  // Derived from a Reactome EntityWithAccessionedSequence. This is a protein
  species MANBA_lysosomal_lumen in lysosomal_lumen; MANBA_lysosomal_lumen is "MANBA [lysosomal lumen]";
  // Derived from a Reactome SimpleEntity. This is a small compound
  species species_6799543 in cytosol; species_6799543 is "alpha-D-Man-(1->3)-[alpha-D-Man-(1->3)-[alpha-D-Man-(1->6)]-alpha-D-Man-(1->6)]-beta-D-Man-(1->4)-beta-D-GlcNAc [cytosol]";
  // Derived from a Reactome SimpleEntity. This is a small compound
  species H2O_lysosomal_lumen in lysosomal_lumen; H2O_lysosomal_lumen is "H2O [lysosomal lumen]";

  // Parameters:
  lambda_reaction_6799545 = 10;
  lambda_reaction_6799581 = 10;
  lambda_reaction_8853710 = 10;
  lambda_reaction_8853686 = 10;
  lambda_reaction_8853391 = 10;
  K_in_29356 = 10;
  K_in_6799591 = 10;
  K_in_6799540 = 10;
  K_in_8853668 = 10;
  K_in_6799546 = 10;
  K_in_8853711 = 10;
  K_in_1605715 = 10;
  K_out_6799594 = 1;
  K_out_1678743 = 1;
  K_out_429579 = 1;
  y_29356 = 0;
  y2_29356 = 0;
  y_6799591 = 0;
  y2_6799591 = 0;
  y_8853396 = 0;
  y2_8853396 = 0;
  y_6799594 = 0;
  y2_6799594 = 0;
  y_1678743 = 0;
  y2_1678743 = 0;
  y_429579 = 0;
  y2_429579 = 0;
  y_6799540 = 0;
  y2_6799540 = 0;
  y_8853668 = 0;
  y2_8853668 = 0;
  y_6799577 = 0;
  y2_6799577 = 0;
  y_6799546 = 0;
  y2_6799546 = 0;
  y_8853719 = 0;
  y2_8853719 = 0;
  y_8853711 = 0;
  y2_8853711 = 0;
  y_6799543 = 0;
  y2_6799543 = 0;
  y_1605715 = 0;
  y2_1605715 = 0;

  // Rate rules:
  y_29356' = (H2O_cytosol - y_29356)/(time + 1e-6);
  y2_29356' = (H2O_cytosol^2 - y2_29356)/(time + 1e-6);
  y_6799591' = (MAN2B2_Zn2_lysosomal_lumen - y_6799591)/(time + 1e-6);
  y2_6799591' = (MAN2B2_Zn2_lysosomal_lumen^2 - y2_6799591)/(time + 1e-6);
  y_8853396' = (species_8853396 - y_8853396)/(time + 1e-6);
  y2_8853396' = (species_8853396^2 - y2_8853396)/(time + 1e-6);
  y_6799594' = (Man_lysosomal_lumen - y_6799594)/(time + 1e-6);
  y2_6799594' = (Man_lysosomal_lumen^2 - y2_6799594)/(time + 1e-6);
  y_1678743' = (GlcNAc_lysosomal_lumen - y_1678743)/(time + 1e-6);
  y2_1678743' = (GlcNAc_lysosomal_lumen^2 - y2_1678743)/(time + 1e-6);
  y_429579' = (Man_cytosol - y_429579)/(time + 1e-6);
  y2_429579' = (Man_cytosol^2 - y2_429579)/(time + 1e-6);
  y_6799540' = (species_6799540 - y_6799540)/(time + 1e-6);
  y2_6799540' = (species_6799540^2 - y2_6799540)/(time + 1e-6);
  y_8853668' = (MAN2B1_Zn2_lysosomal_lumen - y_8853668)/(time + 1e-6);
  y2_8853668' = (MAN2B1_Zn2_lysosomal_lumen^2 - y2_8853668)/(time + 1e-6);
  y_6799577' = (species_6799577 - y_6799577)/(time + 1e-6);
  y2_6799577' = (species_6799577^2 - y2_6799577)/(time + 1e-6);
  y_6799546' = (MAN2C1_Zn2_cytosol - y_6799546)/(time + 1e-6);
  y2_6799546' = (MAN2C1_Zn2_cytosol^2 - y2_6799546)/(time + 1e-6);
  y_8853719' = (GlcNAc_Man_lysosomal_lumen - y_8853719)/(time + 1e-6);
  y2_8853719' = (GlcNAc_Man_lysosomal_lumen^2 - y2_8853719)/(time + 1e-6);
  y_8853711' = (MANBA_lysosomal_lumen - y_8853711)/(time + 1e-6);
  y2_8853711' = (MANBA_lysosomal_lumen^2 - y2_8853711)/(time + 1e-6);
  y_6799543' = (species_6799543 - y_6799543)/(time + 1e-6);
  y2_6799543' = (species_6799543^2 - y2_6799543)/(time + 1e-6);
  y_1605715' = (H2O_lysosomal_lumen - y_1605715)/(time + 1e-6);
  y2_1605715' = (H2O_lysosomal_lumen^2 - y2_1605715)/(time + 1e-6);

  // Reactions:
  // Endoplasmic reticulum-associated degradation of misfolded glycoproteins ensures only functional, correctly folded proteins exit from the endoplasmic reticulum and that misfolded ones are targeted for lysosomal degradation. Misfolded glycoproteins are deglycosylated in the cytosol and the resultant free oligosaccharide can be further hydrolysed by alpha-mannosidase 2C1 (MAN2C1). For example, the oligosaccharide structure GlcNAc (Man)9 is hydrolysed by MAN2C1 to GlcNAc (Man)5, an intermediate structure formed in the N-glycan precursor biosynthesis pathway (Suzuki et al. 2006).
  reaction_6799545: 4 H2O_cytosol + species_6799540 => 4 Man_cytosol + species_6799543; lambda_reaction_6799545*(MAN2C1_Zn2_cytosol^10/(0.5^10 + MAN2C1_Zn2_cytosol^10))*H2O_cytosol*species_6799540; reaction_6799545 is "MAN2C1 hydrolyses GlcNAc (Man)9 to GlcNAc (Man)5";  // modifiers: MAN2C1_Zn2_cytosol
  // Endoplasmic reticulum-associated degradation of misfolded glycoproteins ensures only functional, correctly folded proteins exit from the endoplasmic reticulum and that misfolded ones are targeted for lysosomal degradation. Once located to the lysosome, epididymis-specific alpha-mannosidase (MAN2B2) can hydrolyse nondegraded oligosaccharides such as GlcNAc (Man)3 to GlcNAc (Man)2 quickly and GlcNAc (Man)2 to GlcNAc:Man slowly (Park et al. 2005, Venkatesan et al. 2009). MAN2B2 is ubiquitously expressed and belongs to a broad alpha-mannosidase family called class 2 alpha-mannosidases (CAZy glycosylhydrolase family 38, GH38). GH38 members are found in the Golgi complex, lysosomes, and cytosol where they are involved in either glycoprotein biosynthesis or catabolism.
  reaction_6799581: species_6799577 + H2O_lysosomal_lumen => 2 Man_lysosomal_lumen + GlcNAc_Man_lysosomal_lumen; lambda_reaction_6799581*(MAN2B2_Zn2_lysosomal_lumen^10/(0.5^10 + MAN2B2_Zn2_lysosomal_lumen^10))*species_6799577*H2O_lysosomal_lumen; reaction_6799581 is "MAN2B2 hydrolyses GlcNAc (Man)3 to GlcNAc:Man";  // modifiers: MAN2B2_Zn2_lysosomal_lumen
  // Beta-mannosidase (MANBA) is the final exoglycosidase in the degradation pathway for N-linked oligosaccharides of glycoproteins, cleaving the beta-mannoside linkage of the disaccharide Man-1,4-GlcNAc (Alkhayat et al. 1998, Percheron et al. 1992). Defects in MANBA causes beta-mannosidosis (MIM:248510), a lysosomal storage disease of glycoprotein catabolism. A wide range of symptoms are observed, dependent on age of onset. The disease is associated with various degrees of mental retardation in most of the cases, hearing loss and speech impairment, hypotonia, epilepsy and peripheral neuropathy (Alkhayat et al. 1998, Molho-Pessach et al. 2007).
  MANBA_hydrolyses_GlcNAc_Man: GlcNAc_Man_lysosomal_lumen => Man_lysosomal_lumen + GlcNAc_lysosomal_lumen; lambda_reaction_8853710*(MANBA_lysosomal_lumen^10/(0.5^10 + MANBA_lysosomal_lumen^10))*GlcNAc_Man_lysosomal_lumen; MANBA_hydrolyses_GlcNAc_Man is "MANBA hydrolyses GlcNAc:Man";  // modifiers: MANBA_lysosomal_lumen
  // Lysosomal alpha-mannosidase (MAN2B1) belongs to a broad alpha-mannosidase family called class 2 alpha-mannosidases (CAZy glycosylhydrolase family 38, GH38). GH38 members are found in the Golgi complex, lysosomes, and cytosol where they are involved in either glycoprotein biosynthesis or catabolism. MAN2B1 (Liao et al. 1996, Berg et al. 1999) is involved in the sequential hydrolysis of mannose oligosaccharides sent to lysosomes for degradation. From the non-reducing end, MAN2B1 catalyses the hydrolysis of alpha(1,2), alpha(1,3) and alpha(1,6) mannosidic linkages (Beccari et al. 1999). Defects in the MAN2B1 gene cause alpha-mannosidosis (MIM:248500), a rare lysosomal storage disease. The disorder is characterised by a range of clinical phenotypes, the major manifestations being mental impairment, hearing impairment, skeletal changes, and immunodeficiency (Borgwardt et al. 2014, Riise Stensland et al. 2015).
  reaction_8853686: species_8853396 + H2O_lysosomal_lumen => 2 Man_lysosomal_lumen + species_6799577; lambda_reaction_8853686*(MAN2B1_Zn2_lysosomal_lumen^10/(0.5^10 + MAN2B1_Zn2_lysosomal_lumen^10))*species_8853396*H2O_lysosomal_lumen; reaction_8853686 is "MAN2B1 hydrolyses GlcNAc (Man)5 to GlcNAc (Man)3";  // modifiers: MAN2B1_Zn2_lysosomal_lumen
  // Free oligosaccharides with the structure GlcNAc (Man)5 are transported from the cytosol to the lysosomal lumen by an unknown mechanism (Saint-Pol et al. 1997).
  reaction_8853391: species_6799543 => species_8853396; lambda_reaction_8853391*species_6799543; reaction_8853391 is "GlcNAc (Man)5 translocates from cytosol to lysosomal lumen";
  source_29356: => H2O_cytosol; K_in_29356;
  source_6799591: => MAN2B2_Zn2_lysosomal_lumen; K_in_6799591;
  source_6799540: => species_6799540; K_in_6799540;
  source_8853668: => MAN2B1_Zn2_lysosomal_lumen; K_in_8853668;
  source_6799546: => MAN2C1_Zn2_cytosol; K_in_6799546;
  source_8853711: => MANBA_lysosomal_lumen; K_in_8853711;
  source_1605715: => H2O_lysosomal_lumen; K_in_1605715;
  sink_6799594: Man_lysosomal_lumen => ; K_out_6799594*Man_lysosomal_lumen;
  sink_1678743: GlcNAc_lysosomal_lumen => ; K_out_1678743*GlcNAc_lysosomal_lumen;
  sink_429579: Man_cytosol => ; K_out_429579*Man_cytosol;
end
