// SBML level 3 version 1
// SBML generated from Reactome version 95 on 12/10/25, 9:11 AM using JSBML version 1.5.

model pathway_5653890()
  // Lactose synthesis
  // Synthesis of the disaccharide lactose takes place within the Golgi apparatus of epithelial cells of the lactating mammary gland. The synthesis itself is a single chemical reaction of free glucose and UDP-galactose to form lactose and UDP. For this reaction to occur, glucose is transported from the cytosol into the Golgi lumen, and B4GALT1 interacts with LALBA (alpha-lactalbumin) to modulate its substrate specificity (Brew and Hill 1975).
  // reactome:R-HSA-5653890 GO:0005989
  // isDescribedBy pubmed:806951

  // Compartments:
  compartment Golgi_lumen;  // GO:0005796
  compartment Golgi_membrane;  // GO:0000139
  compartment cytosol;  // GO:0005829

  // Species:
  // Derived from a Reactome SimpleEntity. This is a small compound
  species Lac_Golgi_lumen in Golgi_lumen; Lac_Golgi_lumen is "Lac [Golgi lumen]";  // reactome:R-ALL-5653871
  // Derived from a Reactome SimpleEntity. This is a small compound
  species UDP_Golgi_lumen in Golgi_lumen; UDP_Golgi_lumen is "UDP [Golgi lumen]";  // reactome:R-ALL-205687
  // Derived from a Reactome EntityWithAccessionedSequence. This is a protein
  species B4GALT1_Golgi_membrane in Golgi_membrane; B4GALT1_Golgi_membrane is "B4GALT1 [Golgi membrane]";  // uniprot:P15291 reactome:R-HSA-528072; isHomologTo reactome:R-MMU-528072 reactome:R-CFA-528072 reactome:R-BTA-528072 reactome:R-SSC-528072
  // Derived from a Reactome SimpleEntity. This is a small compound
  species Glc_Golgi_lumen in Golgi_lumen; Glc_Golgi_lumen is "Glc [Golgi lumen]";  // reactome:R-ALL-964746
  // Derived from a Reactome SimpleEntity. This is a small compound
  species UDP_Gal_Golgi_lumen in Golgi_lumen; UDP_Gal_Golgi_lumen is "UDP-Gal [Golgi lumen]";  // reactome:R-ALL-735682
  // Derived from a Reactome SimpleEntity. This is a small compound
  species Glc_cytosol in cytosol; Glc_cytosol is "Glc [cytosol]";  // reactome:R-ALL-70113
  // Derived from a Reactome Complex. Here is Reactomes nested structure for this complex: (P00709, P15291). Reactome uses a nested structure for complexes, which cannot be fully represented in SBML Level 3 Version 1 core
  species B4GALT1_LALBA_Golgi_membrane in Golgi_membrane; B4GALT1_LALBA_Golgi_membrane is "B4GALT1:LALBA [Golgi membrane]";  // isDescribedBy pubmed:11947697 pubmed:11419947; reactome:R-HSA-5653885; hasPart uniprot:P00709 uniprot:P15291; isHomologTo reactome:R-MMU-5653885 reactome:R-CFA-5653885 reactome:R-BTA-5653885 reactome:R-SSC-5653885
  // Derived from a Reactome SimpleEntity. This is a small compound
  species H_Golgi_lumen in Golgi_lumen; H_Golgi_lumen is "H+ [Golgi lumen]";  // reactome:R-ALL-425969
  // Derived from a Reactome Complex. Here is Reactomes nested structure for this complex: (4xP11166). Reactome uses a nested structure for complexes, which cannot be fully represented in SBML Level 3 Version 1 core
  species SLC2A1_tetramer_Golgi_membrane in Golgi_membrane; SLC2A1_tetramer_Golgi_membrane is "SLC2A1 tetramer [Golgi membrane]";  // reactome:R-HSA-5653881; hasPart uniprot:P11166; isHomologTo reactome:R-MMU-5653881 reactome:R-RNO-5653881 reactome:R-CFA-5653881 reactome:R-BTA-5653881
  // Derived from a Reactome EntityWithAccessionedSequence. This is a protein
  species LALBA_Golgi_lumen in Golgi_lumen; LALBA_Golgi_lumen is "LALBA [Golgi lumen]";  // isDescribedBy pubmed:5049057; uniprot:P00709 reactome:R-HSA-5653896; isHomologTo reactome:R-MMU-5653896 reactome:R-CFA-5653896 reactome:R-BTA-5653896 reactome:R-SSC-5653896
  // Derived from a Reactome SimpleEntity. This is a small compound
  species Mn2_Golgi_lumen in Golgi_lumen; Mn2_Golgi_lumen is "Mn2+ [Golgi lumen]";  // reactome:R-ALL-5653875

  // Parameters:
  lambda_5653873 = 10; lambda_5653873 is "Rate constant for Glc transport";
  lambda_5653886 = 10; lambda_5653886 is "Rate constant for Complex formation";
  lambda_5653878 = 10; lambda_5653878 is "Rate constant for Lac synthesis";
  K_in_70113 = 10;
  K_in_735682 = 10;
  K_in_528072 = 10;
  K_in_5653896 = 10;
  K_in_5653881 = 10;
  K_in_5653875 = 10;
  K_out_5653871 = 1; K_out_5653871 is "Flux out for Lac";
  K_out_205687 = 1; K_out_205687 is "Flux out for UDP";
  K_out_425969 = 1; K_out_425969 is "Flux out for H+";
  y_5653871 = 0; y_5653871 is "Mean of Lac";
  y2_5653871 = 0; y2_5653871 is "Second Moment of Lac";
  y_205687 = 0; y_205687 is "Mean of UDP";
  y2_205687 = 0; y2_205687 is "Second Moment of UDP";
  y_425969 = 0; y_425969 is "Mean of H+";
  y2_425969 = 0; y2_425969 is "Second Moment of H+";
  y_964746 = 0; y_964746 is "Mean of Glc [Golgi lumen]";
  y2_964746 = 0; y2_964746 is "Second Moment of Glc [Golgi lumen]";
  y_735682 = 0; y_735682 is "Mean of UDP-Gal";
  y2_735682 = 0; y2_735682 is "Second Moment of UDP-Gal";
  y_70113 = 0; y_70113 is "Mean of Glc [cytosol]";
  y2_70113 = 0; y2_70113 is "Second Moment of Glc [cytosol]";
  y_528072 = 0; y_528072 is "Mean of B4GALT1";
  y2_528072 = 0; y2_528072 is "Second Moment of B4GALT1";
  y_5653896 = 0; y_5653896 is "Mean of LALBA";
  y2_5653896 = 0; y2_5653896 is "Second Moment of LALBA";
  y_5653885 = 0; y_5653885 is "Mean of B4GALT1:LALBA";
  y2_5653885 = 0; y2_5653885 is "Second Moment of B4GALT1:LALBA";
  y_5653881 = 0; y_5653881 is "Mean of SLC2A1 tetramer";
  y2_5653881 = 0; y2_5653881 is "Second Moment of SLC2A1 tetramer";
  y_5653875 = 0; y_5653875 is "Mean of Mn2+";
  y2_5653875 = 0; y2_5653875 is "Second Moment of Mn2+";

  // Rate rules:
  y_5653871' = (Lac_Golgi_lumen - y_5653871)/(time + 1e-6);
  y2_5653871' = (Lac_Golgi_lumen^2 - y2_5653871)/(time + 1e-6);
  y_205687' = (UDP_Golgi_lumen - y_205687)/(time + 1e-6);
  y2_205687' = (UDP_Golgi_lumen^2 - y2_205687)/(time + 1e-6);
  y_425969' = (H_Golgi_lumen - y_425969)/(time + 1e-6);
  y2_425969' = (H_Golgi_lumen^2 - y2_425969)/(time + 1e-6);
  y_964746' = (Glc_Golgi_lumen - y_964746)/(time + 1e-6);
  y2_964746' = (Glc_Golgi_lumen^2 - y2_964746)/(time + 1e-6);
  y_735682' = (UDP_Gal_Golgi_lumen - y_735682)/(time + 1e-6);
  y2_735682' = (UDP_Gal_Golgi_lumen^2 - y2_735682)/(time + 1e-6);
  y_70113' = (Glc_cytosol - y_70113)/(time + 1e-6);
  y2_70113' = (Glc_cytosol^2 - y2_70113)/(time + 1e-6);
  y_528072' = (B4GALT1_Golgi_membrane - y_528072)/(time + 1e-6);
  y2_528072' = (B4GALT1_Golgi_membrane^2 - y2_528072)/(time + 1e-6);
  y_5653896' = (LALBA_Golgi_lumen - y_5653896)/(time + 1e-6);
  y2_5653896' = (LALBA_Golgi_lumen^2 - y2_5653896)/(time + 1e-6);
  y_5653885' = (B4GALT1_LALBA_Golgi_membrane - y_5653885)/(time + 1e-6);
  y2_5653885' = (B4GALT1_LALBA_Golgi_membrane^2 - y2_5653885)/(time + 1e-6);
  y_5653881' = (SLC2A1_tetramer_Golgi_membrane - y_5653881)/(time + 1e-6);
  y2_5653881' = (SLC2A1_tetramer_Golgi_membrane^2 - y2_5653881)/(time + 1e-6);
  y_5653875' = (Mn2_Golgi_lumen - y_5653875)/(time + 1e-6);
  y2_5653875' = (Mn2_Golgi_lumen^2 - y2_5653875)/(time + 1e-6);

  // Reactions:
  // In the Golgi membrane, the B4GALT1 subunit of the B4GALT1:LALBA (beta-1,4-galactosyltransferase 1 : alpha-lactalbumin) complex catalyzes the transfer of galactose from UDP-galactose to free glucose to form galactose and UDP (Andrews 1970; Ramakrishnan and Qasba 2001). The representation here of a stable protein complex catalyzing the transformation of small molecule substrates provides a simplified view of the true reaction mechanism (Brew and Hill 1975), but is sufficient to identify the key participating molecules and their roles.
  reaction_5653878: Glc_Golgi_lumen + UDP_Gal_Golgi_lumen => UDP_Golgi_lumen + Lac_Golgi_lumen + H_Golgi_lumen; lambda_5653878*(B4GALT1_LALBA_Golgi_membrane^10/(0.5^10 + B4GALT1_LALBA_Golgi_membrane^10))*Glc_Golgi_lumen*UDP_Gal_Golgi_lumen; reaction_5653878 is "B4GALT1:LALBA transfers Gal from UDP-Gal to Glc to form Lac";  // modifiers: B4GALT1_LALBA_Golgi_membrane; reactome:R-HSA-5653878; isDescribedBy pubmed:11947697 pubmed:806951 pubmed:11419947; reactome:R-HSA-5653878; GO:0004461
  // SLC2A1 (aka GLUT1) tetramer in the Golgi membrane mediates the facilitated diffusion of glucose from the cytosol into the Golgi lumen. SLC2A1, normally confined to the plasma membrane, is also abundant in the Golgi membranes of epithelial cells of the lactating mammary gland, as demonstrated experimentally in mice (Nemeth et al. 2000). It is not known how this physiological state-specific relocalization is regulated.
  reaction_5653873: Glc_cytosol => Glc_Golgi_lumen; lambda_5653873*(SLC2A1_tetramer_Golgi_membrane^10/(0.5^10 + SLC2A1_tetramer_Golgi_membrane^10))*Glc_cytosol; reaction_5653873 is "SLC2A1 tetramer transports Glc from cytosol to Golgi lumen";  // modifiers: SLC2A1_tetramer_Golgi_membrane; reactome:R-HSA-5653873; isDescribedBy pubmed:10759149; reactome:R-HSA-5653873; GO:0055056
  // B4GALT1 (beta-1,4-galactosyltransferase 1) in the Golgi membrane associates with LALBA (alpha-lactalbumin) to form a heterodimer. This binding reaction is positively regulated by Mn2+ ions and UDP-galactose. This heterodimer has been observed both in solution in vitro and in crystalline form (Andrews 1970; Ramakrishnan and Qasba 2001). The galactosyltransferase enzyme is found in the Golgi membrane of many cell types. LALBA is expressed specifically in the lactating mammary gland. Binding LALBA modulates the specificity of the galactosyltransferase enzyme. Alone, B4GALT1 transfers galactose moieties to glycolipids and N-linked oligosaccharides of glycoproteins. Complexed with LALBA, it transfers galactose to free glucose to form lactose (Brew and Hill 1975).
  B4GALT1_binds_LALBA: B4GALT1_Golgi_membrane + LALBA_Golgi_lumen => B4GALT1_LALBA_Golgi_membrane; lambda_5653886*(Mn2_Golgi_lumen^10/(0.5^10 + Mn2_Golgi_lumen^10))*(UDP_Gal_Golgi_lumen^10/(0.5^10 + UDP_Gal_Golgi_lumen^10))*B4GALT1_Golgi_membrane*LALBA_Golgi_lumen;  // modifiers: UDP_Gal_Golgi_lumen, Mn2_Golgi_lumen; reactome:R-HSA-5653886; isDescribedBy pubmed:11947697 pubmed:806951 pubmed:11419947; reactome:R-HSA-5653886; GO:0140767
  source_70113: => Glc_cytosol; K_in_70113; source_70113 is "Source for Glc [cytosol]";
  source_735682: => UDP_Gal_Golgi_lumen; K_in_735682; source_735682 is "Source for UDP-Gal [Golgi lumen]";
  source_528072: => B4GALT1_Golgi_membrane; K_in_528072; source_528072 is "Source for B4GALT1 [Golgi membrane]";
  source_5653896: => LALBA_Golgi_lumen; K_in_5653896; source_5653896 is "Source for LALBA [Golgi lumen]";
  source_5653881: => SLC2A1_tetramer_Golgi_membrane; K_in_5653881; source_5653881 is "Source for SLC2A1 tetramer [Golgi membrane]";
  source_5653875: => Mn2_Golgi_lumen; K_in_5653875; source_5653875 is "Source for Mn2+ [Golgi lumen]";
  sink_5653871: Lac_Golgi_lumen => ; K_out_5653871; sink_5653871 is "Sink for Lac [Golgi lumen]";
  sink_205687: UDP_Golgi_lumen => ; K_out_205687; sink_205687 is "Sink for UDP [Golgi lumen]";
  sink_425969: H_Golgi_lumen => ; K_out_425969; sink_425969 is "Sink for H+ [Golgi lumen]";
end
